! GAPS deck: binary/2-column shape file inputs — deterministic.
! LoadShape SngFile/DblFile/PQCSVFile, TShape SngFile, PriceShape DblFile,
! GrowthShape CSVFile. Fixture files live next to this deck (generated by the
! golden gen script; committed as fixtures).
Clear
New Circuit.gaps_binshapes basekv=12.47 phases=3 bus1=sourcebus mvasc3=200 mvasc1=210
New Loadshape.ls_sng npts=8 interval=1 sngfile=ls8.sng
New Loadshape.ls_dbl npts=8 interval=1 dblfile=ls8.dbl
New Loadshape.ls_pq npts=8 interval=1 pqcsvfile=lspq8.csv
New Tshape.t_sng npts=8 interval=1 sngfile=t8.sng
New Priceshape.p_dbl npts=8 interval=1 dblfile=p8.dbl
New GrowthShape.g_csv npts=4 csvfile=g4.csv
New Line.l1 bus1=sourcebus bus2=b1 phases=3 r1=0.30 x1=0.90 r0=0.9 x0=2.7 c1=3.0 c0=1.5 length=2 units=km
New Load.ld1 bus1=b1 phases=3 kv=12.47 kw=800 pf=0.95 model=1 daily=ls_sng
New Load.ld2 bus1=b1 phases=3 kv=12.47 kw=300 pf=0.92 model=1 daily=ls_pq
New Monitor.m_ld1 element=Load.ld1 terminal=1 mode=1 ppolar=no
New Monitor.m_ld2 element=Load.ld2 terminal=1 mode=1 ppolar=no
Set voltagebases=[12.47]
Calcvoltagebases
Set mode=daily stepsize=1h number=8
Solve
